// SBML level 3 version 1

model codeine_kidney(Vki, Vurine, Vext, cod_ext, ncod_ext, c6g_ext, mor_ext, nmor_ext, m3g_ext, m6g_ext, cod_urine, mor_urine, ncod_urine, c6g_urine, nmor_urine, m3g_urine, m6g_urine)
  // model units - substance: mmole, time: min, volume: litre, area: m2, length: m, extent: mmole

  // Compartments:
  compartment Vki = 1 litre; Vki is "kidney";
  compartment Vurine = 1 litre;
  compartment Vext = 1 litre; Vext is "extern";

  // Species:
  substanceOnly species cod_ext in Vext = 0; cod_ext is "codeine (extern)";
  substanceOnly species ncod_ext in Vext = 0; ncod_ext is "norcodeine (extern)";
  substanceOnly species c6g_ext in Vext = 0; c6g_ext is "codeine-6-glucuronide (extern)";
  substanceOnly species mor_ext in Vext = 0; mor_ext is "morphine (extern)";
  substanceOnly species nmor_ext in Vext = 0; nmor_ext is "normorphine (extern)";
  substanceOnly species m3g_ext in Vext = 0; m3g_ext is "morphine-3-glucuronide (extern)";
  substanceOnly species m6g_ext in Vext = 0; m6g_ext is "morphine-6-glucuronide (extern)";
  substanceOnly species cod in Vki = 0; cod is "codeine";
  substanceOnly species mor in Vki = 0; mor is "morphine";
  substanceOnly species ncod in Vki = 0; ncod is "norcodeine";
  substanceOnly species c6g in Vki = 0; c6g is "codeine-6-glucuronide";
  substanceOnly species nmor in Vki = 0; nmor is "normorphine";
  substanceOnly species m3g in Vki = 0; m3g is "morphine-3-glucuronide";
  substanceOnly species m6g in Vki = 0; m6g is "morphine-6-glucuronide";
  substanceOnly species cod_urine in Vurine = 0; cod_urine is "codeine (urine)";
  substanceOnly species mor_urine in Vurine = 0; mor_urine is "morphine (urine)";
  substanceOnly species ncod_urine in Vurine = 0; ncod_urine is "norcodeine (urine)";
  substanceOnly species c6g_urine in Vurine = 0; c6g_urine is "codeine-6-glucuronide (urine)";
  substanceOnly species nmor_urine in Vurine = 0; nmor_urine is "normorphine (urine)";
  substanceOnly species m3g_urine in Vurine = 0; m3g_urine is "morphine-3-glucuronide (urine)";
  substanceOnly species m6g_urine in Vurine = 0; m6g_urine is "morphine-6-glucuronide (urine)";

  // Parameters:
  CODIM_Vmax = 0.1 mmole_per_min;
  CODIM_Km = 1 mM;
  MORIM_Vmax = 0.1 mmole_per_min;
  MORIM_Km = 1 mM;
  NCODIM_Vmax = 0.1 mmole_per_min;
  NCODIM_Km = 1 mM;
  C6GIM_Vmax = 0.1 mmole_per_min;
  C6GIM_Km = 1 mM;
  NMORIM_Vmax = 0.1 mmole_per_min;
  NMORIM_Km = 1 mM;
  M3GIM_Vmax = 0.1 mmole_per_min;
  M3GIM_Km = 1 mM;
  M6GIM_Vmax = 0.1 mmole_per_min;
  M6GIM_Km = 1 mM;
  CODEX_Vmax = 0.1 mmole_per_min;
  CODEX_Km = 1 mM;
  MOREX_Vmax = 0.1 mmole_per_min;
  MOREX_Km = 1 mM;
  NCODEX_Vmax = 0.1 mmole_per_min;
  NCODEX_Km = 1 mM;
  C6GEX_Vmax = 0.1 mmole_per_min;
  C6GEX_Km = 1 mM;
  NMOREX_Vmax = 0.1 mmole_per_min;
  NMOREX_Km = 1 mM;
  M3GEX_Vmax = 0.1 mmole_per_min;
  M3GEX_Km = 1 mM;
  M6GEX_Vmax = 0.1 mmole_per_min;
  M6GEX_Km = 1 mM;

  // Reactions:
  CODIM: cod_ext -> cod; CODIM_Vmax*(cod_ext/Vext/(cod_ext/Vext + CODIM_Km));
  MORIM: mor_ext -> mor; MORIM_Vmax*(mor_ext/Vext/(mor_ext/Vext + MORIM_Km));
  NCODIM: ncod_ext -> ncod; NCODIM_Vmax*(ncod_ext/Vext/(ncod_ext/Vext + NCODIM_Km));
  C6GIM: c6g_ext -> c6g; C6GIM_Vmax*(c6g_ext/Vext/(c6g_ext/Vext + C6GIM_Km));
  NMORIM: nmor_ext -> nmor; NMORIM_Vmax*(nmor_ext/Vext/(nmor_ext/Vext + NMORIM_Km));
  M3GIM: m3g_ext -> m3g; M3GIM_Vmax*(m3g_ext/Vext/(m3g_ext/Vext + M3GIM_Km));
  M6GIM: m6g_ext -> m6g; M6GIM_Vmax*(m6g_ext/Vext/(m6g_ext/Vext + M6GIM_Km));
  CODEX: cod => cod_urine; CODEX_Vmax*(cod/Vki/(cod/Vki + CODIM_Km));
  MOREX: mor => mor_urine; MOREX_Vmax*(mor/Vki/(mor/Vki + MOREX_Km));
  NCODEX: ncod => ncod_urine; NCODEX_Vmax*(ncod/Vki/(ncod/Vki + NCODEX_Km));
  C6GEX: c6g => c6g_urine; C6GEX_Vmax*(c6g/Vki/(c6g/Vki + C6GEX_Km));
  NMOREX: nmor => nmor_urine; NMOREX_Vmax*(nmor/Vki/(nmor/Vki + NMOREX_Km));
  M3GEX: m3g => m3g_urine; M3GEX_Vmax*(m3g/Vki/(m3g/Vki + M3GEX_Km));
  M6GEX: m6g => m6g_urine; M6GEX_Vmax*(m6g/Vki/(m6g/Vki + M6GEX_Km));

  // Unit definitions:
  unit mmole = 1e-3 mole;
  unit min = 60 second;
  unit m = metre;
  unit m2 = metre^2;
  unit mM = 1e-3 mole / litre;
  unit mmole_per_min = 1e-3 mole / (60 second);
end
