// SBML level 3 version 1

model codeine_liver(Vli, Vext, cod_ext, ncod_ext, c6g_ext, mor_ext, nmor_ext, m3g_ext, m6g_ext)
  // model units - substance: mmole, time: min, volume: litre, area: m2, length: m, extent: mmole

  // Compartments:
  compartment Vli = 1.5 litre; Vli is "liver";
  compartment Vext = 1 litre; Vext is "extern";

  // Species:
  substanceOnly species cod_ext in Vext = 0; cod_ext is "codeine (extern)";
  substanceOnly species ncod_ext in Vext = 0; ncod_ext is "norcodeine (extern)";
  substanceOnly species c6g_ext in Vext = 0; c6g_ext is "codeine-6-glucuronide (extern)";
  substanceOnly species mor_ext in Vext = 0; mor_ext is "morphine (extern)";
  substanceOnly species nmor_ext in Vext = 0; nmor_ext is "normorphine (extern)";
  substanceOnly species m3g_ext in Vext = 0; m3g_ext is "morphine-3-glucuronide (extern)";
  substanceOnly species m6g_ext in Vext = 0; m6g_ext is "morphine-6-glucuronide (extern)";
  substanceOnly species cod in Vli = 0; cod is "codeine";
  substanceOnly species mor in Vli = 0; mor is "morphine";
  substanceOnly species ncod in Vli = 0; ncod is "norcodeine";
  substanceOnly species c6g in Vli = 0; c6g is "codeine-6-glucuronide";
  substanceOnly species nmor in Vli = 0; nmor is "normorphine";
  substanceOnly species m3g in Vli = 0; m3g is "morphine-3-glucuronide";
  substanceOnly species m6g in Vli = 0; m6g is "morphine-6-glucuronide";

  // Parameters:
  CODIM_Vmax = 0.1 mmole_per_min;
  CODIM_Km = 1 mM;
  MOREX_Vmax = 0.1 mmole_per_min;
  MOREX_Km = 1 mM;
  NCODEX_Vmax = 0.1 mmole_per_min;
  NCODEX_Km = 1 mM;
  C6GEX_Vmax = 0.1 mmole_per_min;
  C6GEX_Km = 1 mM;
  NMOREX_Vmax = 0.1 mmole_per_min;
  NMOREX_Km = 1 mM;
  M3GEX_Vmax = 0.1 mmole_per_min;
  M3GEX_Km = 1 mM;
  M6GEX_Vmax = 0.1 mmole_per_min;
  M6GEX_Km = 1 mM;
  MOR_Vmax = 0.1 mmole_per_min;
  MOR_Km = 1.079 mM;
  NCOD_Vmax = 0.3 mmole_per_min;
  NCOD_Km = 0.8 mM;
  C6G_Vmax = 2 mmole_per_min;
  C6G_Km = 1 mM;
  M3G_Vmax = 0.1 mmole_per_min;
  M3G_Km = 1 mM;
  M6G_Vmax = 0.1 mmole_per_min;
  M6G_Km = 1 mM;
  NMOR_Vmax = 0.1 mmole_per_min;
  NMOR_Km = 1 mM;

  // Reactions:
  CODIM: cod_ext -> cod; CODIM_Vmax*(cod_ext/Vext/(cod_ext/Vext + CODIM_Km));
  MOREX: mor -> mor_ext; MOREX_Vmax*(mor/Vli/(mor/Vli + MOREX_Km));
  NCODEX: ncod -> ncod_ext; NCODEX_Vmax*(ncod/Vli/(ncod/Vli + NCODEX_Km));
  C6GEX: c6g -> c6g_ext; C6GEX_Vmax*(c6g/Vli/(c6g/Vli + C6GEX_Km));
  NMOREX: nmor -> nmor_ext; NMOREX_Vmax*(nmor/Vli/(nmor/Vli + NMOREX_Km));
  M3GEX: m3g -> m3g_ext; M3GEX_Vmax*(m3g/Vli/(m3g/Vli + M3GEX_Km));
  M6GEX: m6g -> m6g_ext; M6GEX_Vmax*(m6g/Vli/(m6g/Vli + M6GEX_Km));
  COD_MOR: cod => mor; MOR_Vmax*(cod/Vli/(cod/Vli + MOR_Km));
  COD_NCOD: cod => ncod; NCOD_Vmax*(cod/Vli/(cod/Vli + NCOD_Km));
  COD_C6G: cod => c6g; C6G_Vmax*(cod/Vli/(cod/Vli + C6G_Km));
  MOR_M3G: mor => m3g; M3G_Vmax*(mor/Vli/(mor/Vli + M3G_Km));
  MOR_M6G: mor => m6g; M6G_Vmax*(mor/Vli/(mor/Vli + M6G_Km));
  MOR_NMOR: mor => nmor; NMOR_Vmax*(mor/Vli/(mor/Vli + NMOR_Km));

  // Unit definitions:
  unit mmole = 1e-3 mole;
  unit min = 60 second;
  unit m = metre;
  unit m2 = metre^2;
  unit mM = 1e-3 mole / litre;
  unit mmole_per_min = 1e-3 mole / (60 second);
end
